# Расчет Обратнаходового преобразователя
# Входные данные:
Uin := 220
Iout1 := 1
Uin_min := 176
Uout1 := 12
Iout2 := 1
Uin_max := 310
Uout2 := 5
Freq := 100000
Pobout := (Iout1*Uout1) + (Iout2*Uout2) = 17  # -Выходная мощность исходяи из входных данных
n := 0.85  # -КПД
# _______________________________________________________________________
# Входная мощность Преобразователя:
Pin := Pobout/n = 20
# Расчет входного фильтра  и выпрямителя :
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# Расчитанные данные :
C1 := 6.8*10^-9  # Входной конденсатор синфазного фильтра
# Марка входного выпрямителя:
C2 := 6.8*10^-9  # Два парных конденсатора синфазного фильтра
UobrD := Uin_max*1.5 = 465
C3 := C2 = 6.8e-9
IoD := 2*(Pin/Uin) = 0.181818
L1 := 3.3*10^-3
Cbridgemin := 3*20 = 60  # мин Cмост=60мкФ  # Марка: DB105S
# _ __________________________________________________________________________
# _ __________________________________________________________________________
# ШИМ Контроллер:
